*Heading
** Job name: Job-1 Model name: Model-1
** Generated by: Abaqus/CAE 6.13-1
*Preprint, echo=NO, model=NO, history=NO, contact=NO
**
** PARTS
**
*Part, name=Part-1
*Node
      1,           9.,           9.,           1.
      2,           9.,           8.,           1.
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*Element, type=C3D8
 1,  21,  22,  32,  31,   1,   2,  12,  11
 2,  22,  23,  33,  32,   2,   3,  13,  12
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*Nset, nset=Set-1, generate
   1,  200,    1
*Elset, elset=Set-1, generate
  1,  81,   1
** Section: Section-1
*Solid Section, elset=Set-1, material=Material-1
,
*End Part
**
**
** ASSEMBLY
**
*Assembly, name=Assembly
**
*Instance, name=Part-1-1, part=Part-1
*End Instance
**
*Nset, nset=Set-X+, instance=Part-1-1, generate
  1,  20,   1
*Elset, elset=Set-X+, instance=Part-1-1, generate
 1,  9,  1
*Nset, nset=Set-X-, instance=Part-1-1, generate
 181,  200,    1
*Elset, elset=Set-X-, instance=Part-1-1, generate
 73,  81,   1
*End Assembly
**
** MATERIALS
**
*Material, name=Material-1
*Density
1.E0,
*Depvar
      84,
*User Material, constants=18, type=MECHANICAL
204.6E3,   137.E3,   126.2E3,  45., 90., 0.0, 1.0,   0.02,
44.0,   1000,  60.0,  5.0,  1.0, 1.4, 100,   300,
0.0, 0.0
*User Defined Field
*Initial Condition, type=field, variable=1
Part-1-1.Set-1,1

*Step, name=Step-1, nlgeom=YES
*Dynamic, Explicit
, 50.
*Bulk Viscosity
0.06, 1.2
*Boundary, type=VELOCITY
Set-X+,1,1,0.009
*Boundary
Set-X-,1,1

*Output, field, variable=ALL
*Output, history, variable=PRESELECT
*Output, history
*Node Output, nset=Set-X+
U1,RF1
*End Step
