*Heading
** Job name: mesh Model name: Model-1
** Generated by: Abaqus/CAE 6.13-1
*Preprint, echo=NO, model=NO, history=NO, contact=NO
**
** PARTS
**
*Part, name=Part-1
*Node
      1,  0.200000003,          16.,  0.200000003
      2,  0.200000003,   15.8000002,  0.200000003
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*Element, type=C3D8
 1, 163, 164, 245, 244,   1,   2,  83,  82
 2, 164, 165, 246, 245,   2,   3,  84,  83
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*Nset, nset=Set-1, generate
   1,  324,    1
*Elset, elset=Set-1, generate
  1,  80,   1
** Section: Section-1
*Solid Section, elset=Set-1, material=Material-1
,
*End Part
**
**
** ASSEMBLY
**
*Assembly, name=Assembly
**
*Instance, name=Part-1-1, part=Part-1
*End Instance
**
*Nset, nset=Set-X+, instance=Part-1-1, generate
   1,  162,    1
*Elset, elset=Set-X+, instance=Part-1-1, generate
  1,  80,   1
*Nset, nset=Set-X-, instance=Part-1-1, generate
 163,  324,    1
*Elset, elset=Set-X-, instance=Part-1-1, generate
  1,  80,   1
*Nset, nset=Set-Y+, instance=Part-1-1, generate
   1,  244,   81
*Elset, elset=Set-Y+, instance=Part-1-1
 1,
*Nset, nset=Set-Y-, instance=Part-1-1, generate
  81,  324,   81
*Elset, elset=Set-Y-, instance=Part-1-1
 80,
*Nset, nset=Set-Z+, instance=Part-1-1
   1,   2,   3,   4,   5,   6
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*Elset, elset=Set-Z+, instance=Part-1-1, generate
  1,  80,   1
*Nset, nset=Set-Z-, instance=Part-1-1
  82,  83,  84,  85,  86,  87
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*Elset, elset=Set-Z-, instance=Part-1-1, generate
  1,  80,   1
*End Assembly
**

**
** MATERIALS
**
*Material, name=Material-1
*Density
 1e+03,
*Elastic
 1.17e+11, 0.333
*Plastic, hardening=USER, properties=4
0.3125e+9, 1e-04, 2.0, 16.0
*User Defined Field
*Depvar
	3
** ----------------------------------------------------------------
**
** STEP: Step-1
**
*Step, name=Step-1, nlgeom=YES
*Dynamic, Explicit
,50.
*Bulk Viscosity
0.06, 1.2
**
** BOUNDARY CONDITIONS
**
** Name: BC-1 Type: Symmetry/Antisymmetry/Encastre
*Boundary
Set-X-, 1, 1
** Name: BC-2 Type: Velocity/Angular velocity
*Boundary, type=VELOCITY
Set-X+, 1, 1, 0.001
** Name: BC-3 Type: Symmetry/Antisymmetry/Encastre
**Boundary
**Set-Z+, 3, 3
** Name: BC-4 Type: Symmetry/Antisymmetry/Encastre
**Boundary
**Set-Z-, 3, 3
**
** OUTPUT REQUESTS
**
*Restart, write, number interval=1, time marks=NO
**
** FIELD OUTPUT: F-Output-1
**
*Output, field, variable=PRESELECT, time interval=0.1
*Element Output
SDV1, SDV2, SDV3
**
** HISTORY OUTPUT: H-Output-1
**
*Output, history, variable=PRESELECT
*Output, history
*Node Output, nset=Set-X+
RF1, U1
*End Step
